# OpenSim document version 30000
ForwardTool FDS:
  replace_force_set: false
  results_directory: output/output_0
  output_precision: 20
  initial_time: 0
  final_time: 0.1
  solve_for_equilibrium_for_auxiliary_states: false
  maximum_number_of_integrator_steps: 20000
  maximum_integrator_step_size: 1
  minimum_integrator_step_size: 1e-8
  integrator_error_tolerance: 1e-5
  states_file: E:/Dokumente/Schule/tum/Informatik/6/Bachelor-Arbeit/Code/SimFind/files/CMC_Reach8_states_abbrev.sto
  use_specified_dt: false
  AnalysisSet Analyses:
    PointKinematics [values shared by the 10 below unless stated]: start_time=0 end_time=0.1 step_interval=1
        in_degrees=true relative_to_body_name=ground
    PointKinematics PointKinematics1: body_name=clavicle point_name=R.Clavicle point=(0.01835 -0.00464 -0.00046)
    PointKinematics PointKinematics2: body_name=thorax point_name=C7 point=(-0.05613 0.05528 -0.00151)
    PointKinematics PointKinematics3: body_name=scapula point_name=R.Shoulder point=(0.0014 -0.00147 0.01369)
    PointKinematics PointKinematics4: body_name=humerus point_name=R.Biceps point=(0.01591 -0.18099 -0.00553)
    PointKinematics PointKinematics5: body_name=humerus point_name=R.Elbow.Lateral point=(0.00509 -0.28055 0.02884)
    PointKinematics PointKinematics6: body_name=radius point_name=R.Forearm point=(0.03828 -0.11326 0.0174)
    PointKinematics PointKinematics7: body_name=radius point_name=R.Radius point=(0.05749 -0.22722 0.02738)
    PointKinematics PointKinematics8: body_name=hand point_name=Handle point=(0.053418 -0.084496 0.009033)
    PointKinematics PointKinematics9: body_name=humerus point_name=R.Elbow.Medial point=(-0.00407 -0.28442 -0.05408)
    PointKinematics PointKinematics10: body_name=ulna point_name=R.Ulna point=(-0.01672 -0.24156 0.04782)
  ControllerSet Controllers:
    ControlSetController: controls_file=E:/Dokumente/Schule/tum/Informatik/6/Bachelor-Arbeit/Code/SimFind/files/Controls/controls_0.xml
